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/BATCH
/COM,ANSYS RELEASE 12.1    UP20091102       16:01:49    12/02/2016
/input,menust,tmp,'',,,,,,,,,,,,,,,,1
/GST,ON
/PLO,INFO,3
/GRO,CURL,ON
/CPLANE,1
WPSTYLE,,,,,,,,0
/NOPR
/PMETH,OFF,0
KEYW,PR_SET,1
KEYW,PR_STRUC,1
KEYW,PR_THERM,0
KEYW,PR_FLUID,0
KEYW,PR_ELMAG,0
KEYW,MAGNOD,0
KEYW,MAGEDG,0
KEYW,MAGHFE,0
KEYW,MAGELC,0
KEYW,PR_MULTI,0
KEYW,PR_CFD,0
/GO
/COM,
/COM,Preferences for GUI filtering have been set to display:
/COM,  Structural
/PREP7
ET,1,SOLID45
KEYOPT,1,1,0
KEYOPT,1,2,0
KEYOPT,1,4,0
KEYOPT,1,5,0
KEYOPT,1,6,0
MPTEMP,,,,,,,,
MPTEMP,1,0
MPDATA,EX,1,,2.034e11
MPDATA,PRXY,1,,0.29
MPTEMP,,,,,,,,
MPTEMP,1,0
MPDATA,DENS,1,,7850
N,1,,,5,,,,
N,2,,,,,,,
NPLOT
/NUMBER,0
NPLOT
NPLOT
/NUMBER,0
N,3,,5,,,,,
NPLOT
N,1,,,5,,,,
NPLOT
/NUMBER,0
N,1,,,5,,,,
N,2,,,,,,,
NPLOT
N,4,,5,5,,,,
N,5,5,0,5,,,,
N,6,5,0,0,,,,
N,7,5,5,0,,,,
N,8,5,5,5,,,,
FLST,2,8,1,ORDE,2
FITEM,2,1
FITEM,2,-8
NDELE,P51X
BLOCK,0,5,0,5,0,5,
TYPE,   1
MAT,       1
REAL,
ESYS,       0
SECNUM,
TSHAP,LINE
ESIZE,5,0,
MSHKEY,0
MSHAPE,1,3d
CM,_Y,VOLU
VSEL, , , ,       1
CM,_Y1,VOLU
CHKMSH,'VOLU'
CMSEL,S,_Y
VMESH,_Y1
CMDELE,_Y
CMDELE,_Y1
CMDELE,_Y2
VCLEAR,       1
VPLOT
LESIZE,ALL,5, , , ,1, , ,1,
MSHKEY,0
MSHAPE,1,3d
CM,_Y,VOLU
VSEL, , , ,       1
CM,_Y1,VOLU
CHKMSH,'VOLU'
CMSEL,S,_Y
MSHAPE,0,3d
MSHKEY,1
VMESH,_Y1
MSHKEY,0
CMDELE,_Y
CMDELE,_Y1
CMDELE,_Y2
EPLOT
FINISH
/SOL
FLST,2,1,1,ORDE,1
FITEM,2,6
/GO
D,P51X, , , , , ,ALL, , , , ,
FLST,2,1,1,ORDE,1
FITEM,2,6
DDELE,P51X,ALL
FLST,2,4,1,ORDE,4
FITEM,2,3
FITEM,2,-4
FITEM,2,6
FITEM,2,-7
/GO
F,P51X,FX,1
FLST,2,1,1,ORDE,1
FITEM,2,5
/GO
D,P51X, , , , , ,ALL, , , , ,
FLST,2,1,1,ORDE,1
FITEM,2,2
FLST,2,1,1,ORDE,1
FITEM,2,2
/GO
D,P51X, , , , , ,ALL,UY, , , ,
FLST,2,1,1,ORDE,1
FITEM,2,2
DDELE,P51X,ALL
FLST,2,1,1,ORDE,1
FITEM,2,2
/GO
D,P51X, , , , , ,UY, , , , ,
FLST,2,1,1,ORDE,1
FITEM,2,6
/GO
D,P51X, , , , , ,UY, , , , ,
/STATUS,SOLU
SOLVE
FINISH
/POST1
PLDISP,0
PLDISP,1
EPLOT
/PSF,DEFA, ,1,0,1
/PBF,DEFA, ,1
/PIC,DEFA, ,1
/PSYMB,CS,0
/PSYMB,NDIR,0
/PSYMB,ESYS,0
/PSYMB,LDIV,0
/PSYMB,LDIR,0
/PSYMB,ADIR,0
/PSYMB,ECON,0
/PSYMB,XNODE,0
/PSYMB,DOT,1
/PSYMB,PCONV,
/PSYMB,LAYR,0
/PSYMB,FBCS,0
/PBC,ALL, ,1
FINISH
/SOL
FLST,2,1,1,ORDE,1
FITEM,2,2
/GO
D,P51X, , , , , ,UX, , , , ,
/STATUS,SOLU
SOLVE
FINISH
/POST1
PLDISP,1
EPLOT
/PSF,DEFA, ,1,0,1
/PBF,DEFA, ,1
/PIC,DEFA, ,1
/PSYMB,CS,0
/PSYMB,NDIR,0
/PSYMB,ESYS,0
/PSYMB,LDIV,0
/PSYMB,LDIR,0
/PSYMB,ADIR,0
/PSYMB,ECON,0
/PSYMB,XNODE,0
/PSYMB,DOT,1
/PSYMB,PCONV,
/PSYMB,LAYR,0
/PSYMB,FBCS,0
/PBC,ALL, ,1
PLDISP,1
FINISH
/SOL
FLST,2,3,1,ORDE,3
FITEM,2,2
FITEM,2,5
FITEM,2,-6
DDELE,P51X,ALL
FLST,2,1,1,ORDE,1
FITEM,2,5
/GO
D,P51X, , , , , ,ALL, , , , ,
FLST,2,1,1,ORDE,1
FITEM,2,8
/GO
D,P51X, , , , , ,UX, , , , ,
FLST,2,1,1,ORDE,1
FITEM,2,2
/GO
D,P51X, , , , , ,UX, , , , ,
FLST,2,1,1,ORDE,1
FITEM,2,1
/GO
D,P51X, , , , , ,UX, , , , ,
FLST,2,1,1,ORDE,1
FITEM,2,2
/GO
D,P51X, , , , , ,UY, , , , ,
/STATUS,SOLU
SOLVE
FINISH
/POST1
PLDISP,1
PRNSOL,U,X
FINISH
/SOL
FINISH
/PREP7
MPTEMP,,,,,,,,
MPTEMP,1,0
MPDE,EX,1
MPDE,NUXY,1
MPDE,PRXY,1
MPDATA,EX,1,,2.034E+011
MPDATA,PRXY,1,,0.29
MPTEMP,,,,,,,,
MPTEMP,1,0
MPDE,DENS,1
MPDATA,DENS,1,,7850
MPTEMP,,,,,,,,
MPTEMP,1,0
MPDE,DENS,1
MPDATA,DENS,1,,7850
FINISH
/POST1
FINISH
/PREP7
FINISH
/POST1
PRNSOL,U,X
PLDISP,1
/PSF,DEFA, ,1,0,1
/PBF,DEFA, ,1
/PIC,DEFA, ,1
/PSYMB,CS,0
/PSYMB,NDIR,0
/PSYMB,ESYS,0
/PSYMB,LDIV,0
/PSYMB,LDIR,0
/PSYMB,ADIR,0
/PSYMB,ECON,0
/PSYMB,XNODE,0
/PSYMB,DOT,1
/PSYMB,PCONV,
/PSYMB,LAYR,0
/PSYMB,FBCS,0
/PBC,ALL, ,1
/PSF,DEFA, ,1,0,1
/PBF,DEFA, ,1
/PIC,DEFA, ,1
/PSYMB,CS,0
/PSYMB,NDIR,0
/PSYMB,ESYS,0
/PSYMB,LDIV,0
/PSYMB,LDIR,0
/PSYMB,ADIR,0
/PSYMB,ECON,0
/PSYMB,XNODE,0
/PSYMB,DOT,1
/PSYMB,PCONV,
/PSYMB,LAYR,0
/PSYMB,FBCS,0
/PBC,ALL,,1
/PBC,NFOR,,0
/PBC,NMOM,,0
/PBC,RFOR,,0
/PBC,RMOM,,0
/PBC,PATH,,0
PRNSOL,U,X
SAVE
FINISH
/SOL
FLST,2,4,1,ORDE,4
FITEM,2,3
FITEM,2,-4
FITEM,2,6
FITEM,2,-7
DDELE,P51X,ALL
FLST,2,4,1,ORDE,4
FITEM,2,1
FITEM,2,-2
FITEM,2,5
FITEM,2,8
DDELE,P51X,ALL
FLST,2,4,1,ORDE,4
FITEM,2,3
FITEM,2,-4
FITEM,2,6
FITEM,2,-7
/GO
D,P51X, , , , , ,UY, , , , ,
FLST,2,4,1,ORDE,4
FITEM,2,3
FITEM,2,-4
FITEM,2,6
FITEM,2,-7
DDELE,P51X,ALL
LSCLEAR,ALL
FLST,2,4,1,ORDE,4
FITEM,2,1
FITEM,2,-2
FITEM,2,5
FITEM,2,8
/GO
D,P51X, , , , , ,ALL, , , , ,
FLST,2,4,1,ORDE,4
FITEM,2,3
FITEM,2,-4
FITEM,2,6
FITEM,2,-7
/GO
F,P51X,FY,-1
SAVE,'test02','db','C:\Users\ecslogon\Desktop\ANSYS\'
/STATUS,SOLU
SOLVE
FINISH
/POST1
PLDISP,1
PRNSOL,U,Y
FINISH
/POST26
FILE,'test01','rst','.'
NUMVAR,200
SOLU,191,NCMIT
STORE,MERGE
FILLDATA,191,,,,1,1
REALVAR,191,191
FINISH
/POST1
PLDISP,1
/PSF,DEFA, ,1,0,1
/PBF,DEFA, ,1
/PIC,DEFA, ,1
/PSYMB,CS,0
/PSYMB,NDIR,0
/PSYMB,ESYS,0
/PSYMB,LDIV,0
/PSYMB,LDIR,0
/PSYMB,ADIR,0
/PSYMB,ECON,0
/PSYMB,XNODE,0
/PSYMB,DOT,1
/PSYMB,PCONV,
/PSYMB,LAYR,0
/PSYMB,FBCS,0
/PBC,ALL,,1
/PBC,NFOR,,0
/PBC,NMOM,,0
/PBC,RFOR,,0
/PBC,RMOM,,0
/PBC,PATH,,0
SAVE
FINISH
! /EXIT,ALL
